<neuroml xmlns="http://www.neuroml.org/schema/neuroml2"  xmlns:xs="http://www.w3.org/2001/XMLSchema" xmlns:xsi="http://www.w3.org/2001/XMLSchema-instance" xsi:schemaLocation="http://www.neuroml.org/schema/neuroml2 https://raw.github.com/NeuroML/NeuroML2/development/Schemas/NeuroML2/NeuroML_v2beta5.xsd" id="HippocampalNet">

    <property tag="Network seed" value="12345"/>
    <include href="../cells/axoaxonic.cell.nml"></include>
    <include href="../cells/bistratified.cell.nml"></include>
    <include href="../cells/cck.cell.nml"></include>
    <include href="../cells/ivy.cell.nml"></include>
    <include href="../cells/ngf.cell.nml"></include>
    <include href="../cells/olm.cell.nml"></include>
    <include href="../cells/poolosyn.cell.nml"></include>
    <include href="../cells/pvbasket.cell.nml"></include>
    <include href="../cells/sca.cell.nml"></include>
    <include href="../synapses/exp2Synapses.synapse.nml"></include>
    <include href="../synapses/customGABASynapses.synapse.nml"></include>
    <include href="stimulations.nml"></include>

    <network id="HippocampalNet" type="networkWithTemperature" temperature="34.0 degC">

        <notes>Network to visualize cells alongside</notes>

        <population id="pop_poolosyn" component="poolosyncell" size="1" type="populationList">
            <instance id="0">
                <location x="0." y="0." z="125."/>
            </instance>
        </population>

        <population id="pop_pvbasket" component="pvbasketcell" size="1" type="populationList">
            <instance id="0">
                <location x="50." y="0." z="125."/>
            </instance>
        </population>

        <population id="pop_cck" component="cckcell" size="1" type="populationList">
            <instance id="0">
                <location x="100." y="0." z="125."/>
            </instance>
        </population>

        <population id="pop_sca" component="scacell" size="1" type="populationList">
            <instance id="0">
                <location x="150." y="0." z="250."/>
            </instance>
        </population>

        <population id="pop_axoaxonic" component="axoaxoniccell" size="1" type="populationList">
            <instance id="0">
                <location x="200." y="0." z="125."/>
            </instance>
        </population>

        <population id="pop_bistratified" component="bistratifiedcell" size="1" type="populationList">
            <instance id="0">
                <location x="250." y="0." z="125."/>
            </instance>
        </population>

        <population id="pop_olm" component="olmcell" size="1" type="populationList">
            <instance id="0">
                <location x="300." y="0." z="50."/>
            </instance>
        </population>

        <population id="pop_ivy" component="ivycell" size="1" type="populationList">
            <instance id="0">
                <location x="350." y="0." z="125."/>
            </instance>
        </population>

        <population id="pop_ngf" component="ngfcell" size="1" type="populationList">
            <instance id="0">
                <location x="400." y="0." z="400."/>
            </instance>
        </population>

    </network>
</neuroml>
