<Lems>

    <!--

        This LEMS file has been automatically generated using PyNeuroML v0.3.1 (libNeuroML v0.2.33)

     -->

    <!-- Specify which component to run -->
    <Target component="Sim_HippocampalNet_scale100000_oc"/>

    <!-- Include core NeuroML2 ComponentType definitions -->
    <Include file="Cells.xml"/>
    <Include file="Networks.xml"/>
    <Include file="Simulation.xml"/>

    <Include file="PyNN.xml"/>
    <Include file="HippocampalNet_scale100000_oc.net.nml"/>

    <Simulation id="Sim_HippocampalNet_scale100000_oc" length="500ms" step="0.01ms" target="HippocampalNet_scale100000_oc" seed="12345">  <!-- Note seed: ensures same random numbers used every run -->

        <OutputFile id="Volts_file__pop_ngf" fileName="Sim_HippocampalNet_scale100000_oc.pop_ngf.v.dat">
            <OutputColumn id="v_pop_ngf_0_ngfcell_v" quantity="pop_ngf/0/ngfcell/v"/>
        </OutputFile>

        <OutputFile id="Volts_file__pop_bistratified" fileName="Sim_HippocampalNet_scale100000_oc.pop_bistratified.v.dat">
            <OutputColumn id="v_pop_bistratified_0_bistratifiedcell_v" quantity="pop_bistratified/0/bistratifiedcell/v"/>
        </OutputFile>

        <OutputFile id="Volts_file__pop_sca" fileName="Sim_HippocampalNet_scale100000_oc.pop_sca.v.dat">
            <OutputColumn id="v_pop_sca_0_scacell_v" quantity="pop_sca/0/scacell/v"/>
        </OutputFile>

        <OutputFile id="Volts_file__pop_olm" fileName="Sim_HippocampalNet_scale100000_oc.pop_olm.v.dat">
            <OutputColumn id="v_pop_olm_0_olmcell_v" quantity="pop_olm/0/olmcell/v"/>
        </OutputFile>

        <OutputFile id="Volts_file__pop_poolosyn" fileName="Sim_HippocampalNet_scale100000_oc.pop_poolosyn.v.dat">
            <OutputColumn id="v_pop_poolosyn_0_poolosyncell_v" quantity="pop_poolosyn/0/poolosyncell/v"/>
            <OutputColumn id="v_pop_poolosyn_1_poolosyncell_v" quantity="pop_poolosyn/1/poolosyncell/v"/>
            <OutputColumn id="v_pop_poolosyn_2_poolosyncell_v" quantity="pop_poolosyn/2/poolosyncell/v"/>
        </OutputFile>

        <OutputFile id="Volts_file__pop_pvbasket" fileName="Sim_HippocampalNet_scale100000_oc.pop_pvbasket.v.dat">
            <OutputColumn id="v_pop_pvbasket_0_pvbasketcell_v" quantity="pop_pvbasket/0/pvbasketcell/v"/>
        </OutputFile>

        <OutputFile id="Volts_file__pop_cck" fileName="Sim_HippocampalNet_scale100000_oc.pop_cck.v.dat">
            <OutputColumn id="v_pop_cck_0_cckcell_v" quantity="pop_cck/0/cckcell/v"/>
        </OutputFile>

        <OutputFile id="Volts_file__pop_axoaxonic" fileName="Sim_HippocampalNet_scale100000_oc.pop_axoaxonic.v.dat">
            <OutputColumn id="v_pop_axoaxonic_0_axoaxoniccell_v" quantity="pop_axoaxonic/0/axoaxoniccell/v"/>
        </OutputFile>

        <OutputFile id="Volts_file__pop_ivy" fileName="Sim_HippocampalNet_scale100000_oc.pop_ivy.v.dat">
            <OutputColumn id="v_pop_ivy_0_ivycell_v" quantity="pop_ivy/0/ivycell/v"/>
        </OutputFile>

    </Simulation>

</Lems>
