<neuroml xmlns="http://www.neuroml.org/schema/neuroml2"  xmlns:xs="http://www.w3.org/2001/XMLSchema" xmlns:xsi="http://www.w3.org/2001/XMLSchema-instance" xsi:schemaLocation="http://www.neuroml.org/schema/neuroml2 https://raw.github.com/NeuroML/NeuroML2/development/Schemas/NeuroML2/NeuroML_v2beta5.xsd" id="PINGNet">
    <notes>

This NeuroML 2 file was generated by OpenCortex v0.1.2 using:
    libNeuroML v0.2.33
    pyNeuroML v0.3.0

    </notes>
    <property tag="Network seed" value="12345"/>
    <include href="../cells/poolosyn.cell.nml"></include>
    <include href="../cells/pvbasket.cell.nml"></include>
    <include href="../synapses/exp2Synapses.synapse.nml"></include>
    <expTwoSynapse id="syn_ca3_to_poolosyn_strong" gbase="10.0nS" erev="0.0mV" tauDecay="3.0ms" tauRise="0.5ms"/>
    <expTwoSynapse id="syn_ec_to_poolosyn_strong" gbase="10.0nS" erev="0.0mV" tauDecay="3.0ms" tauRise="0.5ms"/>
    <expTwoSynapse id="syn_ca3_to_pvbasket_strong" gbase="5.0nS" erev="0.0mV" tauDecay="6.3ms" tauRise="2.0ms"/>
    <poissonFiringSynapse id="pop_ca3_to_poolosyn" averageRate="5.00 Hz" synapse="syn_ca3_to_poolosyn_strong" spikeTarget="./syn_ca3_to_poolosyn_strong"/>
    <poissonFiringSynapse id="pop_ec_to_poolosyn" averageRate="5.00 Hz" synapse="syn_ec_to_poolosyn_strong" spikeTarget="./syn_ec_to_poolosyn_strong"/>
    <poissonFiringSynapse id="pop_ca3_to_pvbasket" averageRate="1.00 Hz" synapse="syn_ca3_to_pvbasket_strong" spikeTarget="./syn_ca3_to_pvbasket_strong"/>
    <network id="PINGNet" type="networkWithTemperature" temperature="34degC">
        <population id="pop_poolosyn" component="poolosyncell" size="16" type="populationList">
            <instance id="0">
                <location x="83.323974509099997" y="2.03383389141" z="165.041301850999986"/>
            </instance>
            <instance id="1">
                <location x="59.727971039899998" y="73.682337897699995" z="38.732269809000002"/>
            </instance>
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        </population>
        <population id="pop_pvbasket" component="pvbasketcell" size="16" type="populationList">
            <instance id="0">
                <location x="37.165671971000002" y="117.721723666000003" z="103.647877151000003"/>
            </instance>
            <instance id="1">
                <location x="191.732500686999998" y="8.307844370270001" z="32.827656420099999"/>
            </instance>
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        </population>
        <projection id="proj_pop_poolosyn_pop_pvbasket" presynapticPopulation="pop_poolosyn" postsynapticPopulation="pop_pvbasket" synapse="syn_poolosyn_to_pvbasket">
            <connectionWD id="0" preCellId="../pop_poolosyn/1/poolosyncell" preSegmentId="12" preFractionAlong="0.287337300948" postCellId="../pop_pvbasket/0/pvbasketcell" postSegmentId="8" postFractionAlong="0.224203056036" weight="20." delay="3 ms"/>
            <connectionWD id="1" preCellId="../pop_poolosyn/7/poolosyncell" preSegmentId="11" preFractionAlong="0.832434188253" postCellId="../pop_pvbasket/0/pvbasketcell" postSegmentId="6" postFractionAlong="0.0738991568632" weight="20." delay="3 ms"/>
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        </projection>
        <projection id="proj_pop_pvbasket_pop_poolosyn" presynapticPopulation="pop_pvbasket" postsynapticPopulation="pop_poolosyn" synapse="syn_pvbasket_to_poolosyn">
            <connectionWD id="0" preCellId="../pop_pvbasket/1/pvbasketcell" preSegmentId="2" preFractionAlong="0.284225492239" postCellId="../pop_poolosyn/0/poolosyncell" postSegmentId="20" postFractionAlong="0.605888943225" weight="15." delay="3 ms"/>
            <connectionWD id="1" preCellId="../pop_pvbasket/0/pvbasketcell" preFractionAlong="0.522803067245" postCellId="../pop_poolosyn/0/poolosyncell" postSegmentId="11" postFractionAlong="0.0377873140236" weight="15." delay="3 ms"/>
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        </projection>
        <projection id="proj_pop_pvbasket_pop_pvbasket" presynapticPopulation="pop_pvbasket" postsynapticPopulation="pop_pvbasket" synapse="syn_pvbasket_to_pvbasket">
            <connectionWD id="0" preCellId="../pop_pvbasket/11/pvbasketcell" preSegmentId="2" preFractionAlong="0.141667633755" postCellId="../pop_pvbasket/0/pvbasketcell" postSegmentId="2" postFractionAlong="0.401384383252" weight="15." delay="3 ms"/>
            <connectionWD id="1" preCellId="../pop_pvbasket/9/pvbasketcell" preSegmentId="2" preFractionAlong="0.436026369678" postCellId="../pop_pvbasket/0/pvbasketcell" postFractionAlong="0.656709222639" weight="15." delay="3 ms"/>
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        </projection>
        <inputList id="proj" population="pop_poolosyn" component="pop_ca3_to_poolosyn">
            <input id="0" target="../pop_poolosyn/0/poolosyncell" destination="synapses" segmentId="699" fractionAlong="0.161950035409"/>
            <input id="1" target="../pop_poolosyn/0/poolosyncell" destination="synapses" segmentId="737" fractionAlong="0.779265350344"/>
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        </inputList>
        <inputList id="proj" population="pop_poolosyn" component="pop_ec_to_poolosyn">
            <input id="0" target="../pop_poolosyn/0/poolosyncell" destination="synapses" segmentId="143" fractionAlong="0.708039039457"/>
            <input id="1" target="../pop_poolosyn/0/poolosyncell" destination="synapses" segmentId="216" fractionAlong="0.932581873139"/>
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        </inputList>
        <inputList id="proj" population="pop_pvbasket" component="pop_ca3_to_pvbasket">
            <input id="0" target="../pop_pvbasket/0/pvbasketcell" destination="synapses" segmentId="13" fractionAlong="0.102704160635"/>
            <input id="1" target="../pop_pvbasket/0/pvbasketcell" destination="synapses" segmentId="24" fractionAlong="0.20200045777"/>
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        </inputList>
    </network>
</neuroml>
